// SBML level 2 version 4

model model()

  // Compartments:
  compartment only;

  // Species:
  species c1 in only = 0;
  species c1dm2 in only = 0;
  species c1dmt1 in only = 0;
  species m2 in only = 0;
  species m2_c1 in only = 0;
  species m2_t2 in only = 0;
  species m2_t2_star in only = 0;
  species m2p in only = 0;
  species mt1 in only = 0;
  species mt1_t2 in only = 0;
  species mt1_t2_m2p in only = 0;
  species t2 in only = 0;

  // Parameters:
  d_m2 = 0.01;
  d_m2t2star = 0.01;
  d_t2 = 0.01;
  k_iso_m2t2 = 2e-8;
  kact_eff_m2 = 3620;
  kcat_m2c1 = 0.0045;
  kcat_mt1c1 = 0.00197;
  ki_mt1t2 = 4.9e-9;
  kiso_m2t2 = 33;
  km_mt1c1 = 2.9e-6;
  koff_m2c1 = 0.0021;
  koff_m2t2 = 6.3;
  koff_mt1t2m2p = 0.0047;
  kon_m2c1 = 2600;
  kon_m2t2 = 5900000;
  kon_mt1t2 = 3540000;
  kon_mt1t2m2p = 140000;
  kshed_eff = 2800;
  p_c1 = 5e-10;
  p_m2p = 8e-10;
  p_mt1 = 1e-9;
  p_t2 = 1.6e-10;

  // Reactions:
  c1_reaction: -> c1; p_c1 - kon_m2c1*m2*c1 + koff_m2c1*m2_c1 - kcat_mt1c1/km_mt1c1*mt1*c1;
  c1dm2_reaction: -> c1dm2; kcat_m2c1*m2_c1;
  c1dmt1_reaction: -> c1dmt1; kcat_mt1c1/km_mt1c1*mt1*c1;
  m2_reaction: -> m2; kact_eff_m2*mt1*mt1_t2_m2p - kon_m2t2*m2*t2 + koff_m2t2*m2_t2 - kon_m2c1*m2*c1 + koff_m2c1*m2_c1 + kcat_m2c1*m2_c1 - d_m2*m2;
  m2_c1_reaction: -> m2_c1; kon_m2c1*m2*c1 - koff_m2c1*m2_c1 - kcat_m2c1*m2_c1;
  m2_t2_reaction: -> m2_t2; kon_m2t2*m2*t2 - koff_m2t2*m2_t2 - kiso_m2t2*m2_t2 + k_iso_m2t2*m2_t2_star;
  m2_t2_star_reaction: -> m2_t2_star; kiso_m2t2*m2_t2 - k_iso_m2t2*m2_t2_star - d_m2t2star*m2_t2_star;
  m2p_reaction: -> m2p; p_m2p - kon_mt1t2m2p*mt1_t2*m2p + koff_mt1t2m2p*mt1_t2_m2p;
  mt1_reaction: -> mt1; p_mt1 - kshed_eff*mt1*mt1 - kon_mt1t2*mt1*t2 + kon_mt1t2*ki_mt1t2*mt1_t2;
  mt1_t2_reaction: -> mt1_t2; kon_mt1t2*mt1*t2 - kon_mt1t2*ki_mt1t2*mt1_t2 - kon_mt1t2m2p*mt1_t2*m2p + koff_mt1t2m2p*mt1_t2_m2p;
  mt1_t2_m2p_reaction: -> mt1_t2_m2p; kon_mt1t2m2p*mt1_t2*m2p - koff_mt1t2m2p*mt1_t2_m2p - kact_eff_m2*mt1*mt1_t2_m2p;
  t2_reaction: -> t2; p_t2 - kon_m2t2*m2*t2 + koff_m2t2*m2_t2 - kon_mt1t2*mt1*t2 + kon_mt1t2*ki_mt1t2*mt1_t2 - d_t2*t2;
end
