// SBML level 2 version 1
// Copyright 2011 - 2013, Sybila, Systems Biology Laboratory and individual
//     contributors by the @authors tag.
//     This file is part of Parasim.
//     Parasim is free software: you can redistribute it and/or modify
//     it under the terms of the GNU General Public License as published by
//     the Free Software Foundation, either version 3 of the License, or
//     (at your option) any later version.
//     This program is distributed in the hope that it will be useful,
//     but WITHOUT ANY WARRANTY; without even the implied warranty of
//     MERCHANTABILITY or FITNESS FOR A PARTICULAR PURPOSE.  See the
//     GNU General Public License for more details.
//     You should have received a copy of the GNU General Public License
//     along with this program.  If not, see <http://www.gnu.org/licenses/>.

model main()

  // Compartments:
  compartment uVol = 1;

  // Species:
  species A in uVol = 16;
  species B in uVol = 0;
  species C in uVol = 14;
  species D in uVol = 14;
  species CD in uVol = 14;

  // Parameters:
  k1 = 7.0370457; k1 is "0_100000000_";
  k2 = 4.0370457; k2 is "0_10sfdv0000_";

  // Reactions:
  R1: A => B; k1*A*C;  // modifiers: C
  R2: C + D -> CD; k2*C*D;
end
